// SBML level 2 version 1

model main()

  // Compartments:
  compartment uVol = 1;

  // Species:
  species pRB in uVol = 5;
  species E2F1 in uVol = 0;

  // Parameters:
  decay_pRB = 0.005;
  decay_E2F1 = 0.1;
  k1 = 1;
  Km1 = 0.5;
  J11 = 0.5;
  kp = 0;
  k2 = 1.6;
  a = 0.04;
  Km2 = 4;
  J12 = 5;

  // Reactions:
  pRB_decay: pRB => ; pRB*decay_pRB;
  E2F1_decay: E2F1 => ; E2F1*decay_E2F1;
  pRB_production: => pRB; k1*(E2F1/(Km1 + E2F1))*(J11/(J11 + pRB));  // modifiers: E2F1
  E2F1_production: => E2F1; kp + k2*((a^2 + E2F1^2)/(Km2^2 + E2F1^2))*(J12/(J12 + E2F1));  // modifiers: pRB
end
